# Input Data
# Mechanical Properties (moduli in GPa)
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E_1t := 31.551
E_1c := 24.154
E_3 := 0.551
E_1 := (E_1t + E_1c)/2 = 27.8525
ν_31 := 0.432
ν_13 := E_3/E_1*ν_31 = 0.00854616
E__1 := E_1/(1 - ν_13*ν_31) = 27.9557
G_13 := 0.322
E__3 := E_3/(1 - ν_13*ν_31) = 0.553042
k_b := π^3*E__1/12*10^3 = 72233.5  # MPa
A_r := 10^3*[E__1, E__1*ν_13; E__3*ν_31, E__3]  # MPa
l_s := 30
w_s := 23
t_s := 30
# Geometry parameters
# mm
l_s := 100
w_s := 22.61
t_s := 7.82
t_0 := 2
l_s := 48
w_s := 23
t_s := 9.6
k(φ) := |sin(φ)|
k_l := 1
S_x := w_s*t_s = 220.8
S_y := l_s*t_s = 460.8
S_z := l_s*w_s = 1104
# Allowables (MPa)
σ_1_t := 394.8
σ_1_c := 89.3
σ_3_t := 0.8
σ_3_c := 68.4*8/7 = 78.1714
τ_13_ := 7.8
σ_inf := σ_1_t*10^11
σ_ins := σ_3_t*10^-100
ε_1_t := σ_1_t/(E_1*10^3) = 0.0141747
ε_1_c := σ_1_c/(E_1*10^3) = 0.00320618
ε_3_t := σ_3_t/(E_3*10^3) = 0.00145191
ε_3_c := σ_3_c/(E_3*10^3) = 0.141872
γ_13_ := τ_13_/(G_13*10^3) = 0.0242236
ε_1_t := 0.0118
ε_1_c := 0.0036
ε_3_t := 0.0099
ε_3_c := 0.1413
γ_13_ := 0.049
# Applied Effective Stresses (MPa)
σ_xe := 0*10^4/S_x = 0
σ_ye := 0
σ_ze := 0
τ_xye := 0
τ_xze := 4176/1125.85 = 3.7092
τ_yze := 0
σx_14 := transpose([σ_xe, σ_ye, σ_ze, τ_xye])*10^-3
τx_56 := transpose([τ_xze, τ_yze])*10^-3
# Applied Loads (N)
P_xy := τ_xye*S_x = 0
P_xz := τ_xze*S_x = 818.991
P_xx := σ_xe*S_x = 0
P_yy := σ_ye*S_y = 0
P_yx := τ_xye*S_y = 0
P_yz := τ_yze*S_y = 0
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P_zz := σ_ze*S_z = 0
P_zx := τ_xze*S_z = 4094.95
P_zy := τ_yze*S_z = 0
P_s := sqrt(P_xz^2 + P_zx^2) = 4176.05
# Effective moduli for 3D model (moduli in GPa)
ψ90(φ, v) := v*k(φ)/(1 + k(φ))
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S_n(φ, v, ψ0) := ψ90(φ, v)/k(φ)*E__1*[
    cos(φ)^4, sin(φ)^2*cos(φ)^2, ν_13*cos(φ)^2;
    sin(φ)^2*cos(φ)^2, k(φ) + sin(φ)^4, ν_13*(k(φ) + sin(φ)^2);
    ν_13*cos(φ)^2, ν_13*(k(φ) + sin(φ)^2), (k(φ) + 1)*ν_13/ν_31
] + ψ0*E__1*[1, 0, ν_13; 0, 0, 0; ν_13, 0, ν_13/ν_31]
S_s(φ, v, ψ0) := ψ90(φ, v)/k(φ)*[E__1*sin(φ)^2*cos(φ)^2, 0, 0; 0, G_13*cos(φ)^2, 0; 0, 0, (k(φ)^2 + sin(φ))*G_13] + ψ0*[0, 0, 0; 0, 0, 0; 0, 0, G_13]
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C_n(φ, v, ψ0) := S_n(φ, v, ψ0)^-1
C_s(φ, v, ψ0) := S_s(φ, v, ψ0)^-1
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E_y0(φ, v, ψ0) := 1/C_n(φ, v, ψ0)[1, 1]
E_x0(φ, v, ψ0) := 1/C_n(φ, v, ψ0)[0, 0]
E_z0(φ, v, ψ0) := 1/C_n(φ, v, ψ0)[2, 2]
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G_yz0(φ, v, ψ0) := 1/C_s(φ, v, ψ0)[2, 2]
G_xy0(φ, v, ψ0) := 1/C_s(φ, v, ψ0)[0, 0]
G_xz0(φ, v, ψ0) := 1/C_s(φ, v, ψ0)[1, 1]
ν_xy0(φ, v, ψ0) := -C_n(φ, v, ψ0)[0, 1]*E_y0(φ, v, ψ0)
ν_xz0(φ, v, ψ0) := -C_n(φ, v, ψ0)[0, 2]*E_z0(φ, v, ψ0)
ν_yz0(φ, v, ψ0) := -C_n(φ, v, ψ0)[1, 2]*E_z0(φ, v, ψ0)
E_x(φ, v) := cos(φ)^4*k(φ)*E_1*v/((k(φ) + sin(φ)^4)*(1 + k(φ)*(1 - ν_13*ν_31)) + ((k(φ) - 1)*sin(φ)^2 - 2*k(φ))*sin(φ)^2*ν_13*ν_31)
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E_y(φ, v) := E_1*k(φ)*v/(k(φ) - ν_13*ν_31 + 1)
E_z(v) := E_3*v
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G_xy(φ, v) := cos(φ)^2*sin(φ)^2/(1 + k(φ))*E__1*v
G_xz(φ, v) := cos(φ)^2/(1 + k(φ))*G_13*v
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G_yz(φ, v) := (k(φ) + sin(φ)^2)/(1 + k(φ))*G_13*v
ν_xy(φ) := sin(φ)^2/cos(φ)^2 - k(φ)*ν_13*ν_31/((k(φ) + 1 - ν_13*ν_31)*cos(φ)^2)
ν_xz := ν_13
ν_yz := ν_13
v_00 := 0.2
ψ_00 := 0
E_yd(φ, v) := E_y(π/180*φ, v)
G_xyd(φ, v) := G_xy(π/180*φ, v)
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E_xd(φ, v) := E_x(π/180*φ, v)
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G_xzd(φ, v) := G_xz(π/180*φ, v)
G_yzd(φ, v) := G_yz(π/180*φ, v)
ν_xyd(φ) := ν_xy(π/180*φ)
ν_zxd(φ, v) := E_xd(φ, v)*ν_xz/E_z(v)
# Effective moduli for 2D model (moduli in GPa)
E_y2(φ, v) := E_1*k(φ)*v/(k(φ) + 1)
E_x2(φ, v) := cos(φ)^4*E_y2(φ, v)/(k(φ) + sin(φ)^4)
G_xy2(φ, v) := cos(φ)^2*sin(φ)^2/(1 + k(φ))*E_1*v
ν_xy2(φ) := sin(φ)^2/cos(φ)^2
G_xy2d(φ, v) := G_xy2(π/180*φ, v)
E_x2d(φ, v) := E_x2(π/180*φ, v)
E_y2d(φ, v) := E_y2(π/180*φ, v)
δ_Ex(φ, v_0) := (E_xd(φ, v_0) - E_x2d(φ, v_0))/E_xd(φ, v_0)*100
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δ_Ey(φ, v_0) := (E_yd(φ, v_0) - E_y2d(φ, v_0))/E_yd(φ, v_0)*100
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ν_xy2d(φ) := ν_xy2(π/180*φ)
δ_Gxy(φ, v_0) := (G_xyd(φ, v_0) - G_xy2d(φ, v_0))/G_xyd(φ, v_0)*100
v_0 := 0.8
φ_0 := 15
E_xd(φ_0, v_0) = 15.164
E_x2d(φ_0, v_0) = 15.1461
δ_νxy(φ) := (ν_xyd(φ) - ν_xy2d(φ))/ν_xyd(φ)*100
ν_xy(φ_0) = 0.730198
E_z(v_0) = 0.4408
E_yd(φ_0, v_0) = 4.59476
E_y2d(φ_0, v_0) = 4.58128
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ν_zxd(φ_0, v_0) = 0.293998
G_xzd(φ_0, v_0) = 0.190928
E_xd(0.00001, 0.999) = 27.8246
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C_e(φ, v) := [
    1/E_x(φ, v), -ν_xy(φ)/E_y(φ, v), -ν_xz/E_z(v);
    -ν_xy(φ)/E_y(φ, v), 1/E_y(φ, v), -ν_xz/E_z(v);
    -ν_xz/E_z(v), -ν_xz/E_z(v), 1/E_z(v)
]
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C_14e(φ, v) := [
    1/E_x(φ, v), -ν_xy(φ)/E_y(φ, v), -ν_xz/E_z(v), 0;
    -ν_xy(φ)/E_y(φ, v), 1/E_y(φ, v), -ν_xz/E_z(v), 0;
    -ν_xz/E_z(v), -ν_xz/E_z(v), 1/E_z(v), 0;
    0, 0, 0, 1/G_xy(φ, v)
]
C_56e(φ, v) := [1/G_xz(φ, v), 0; 0, 1/G_yz(φ, v)]
# Strains in XYZ CS (mm/mm)
v_0 = 0.8
εx_14(φ, v) := C_14e(φ, v)*σx_14
εx_14d(φ, v) := εx_14(π/180*φ, v)
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γx_56(φ, v) := C_56e(φ, v)*τx_56
γx_56d(φ, v) := γx_56(π/180*φ, v)
# Strains in the ribs (in 1-3 CS, mm/mm)
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ε_1(θ, φ, v) := εx_14(φ, v)[0]*cos(θ)^2 + εx_14(φ, v)[1]*sin(θ)^2 + εx_14(φ, v)[3]*cos(θ)*sin(θ)
ε_3(θ, φ, v) := εx_14(φ, v)[2]
γ_13(θ, φ, v) := γx_56(φ, v)[0]*cos(θ) + γx_56(φ, v)[1]*sin(θ)
ε_1d(θ, φ, v) := ε_1(π/180*θ, π/180*φ, v)
γx_56(φ_0, v_0)[0] = 0.041174
ε_3d(θ, φ, v) := ε_3(π/180*θ, π/180*φ, v)
γx_56(φ_0, v_0)[1] = 0
γ_13d(θ, φ, v) := γ_13(π/180*θ, π/180*φ, v)
γ_13d(90, φ_0, v_0) = 1.18953e-18
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ε_r(θ, φ, v) := [ε_1(θ, φ, v); ε_3(θ, φ, v)]
# Stresses in the ribs (in 1-3 CS, MPa)
σ_r(θ, φ, v) := A_r*ε_r(θ, φ, v)
σ_rd(θ, φ, v) := σ_r(π/180*θ, π/180*φ, v)
τ_r13(θ, φ, v) := 10^3*G_13*γ_13(θ, φ, v)
τ_r13d(θ, φ, v) := τ_r13(π/180*θ, π/180*φ, v)
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σ_rd(φ_0, φ_0, v_0)[0] = 0
σ_rd(φ_0, φ_0, v_0)[1] = 0
τ_r13d(φ_0, φ_0, v_0) = 6.0424
σ_rd(90, φ_0, v_0)[0] = 0
σ_rd(90, φ_0, v_0)[1] = 0
τ_r13d(90, φ_0, v_0) = 3.8303e-16
γ_13d(90, φ_0, v_0) = 1.18953e-18
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# Analysis of the normalized rib dimensions
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l_φ(φ, v) := (1 + k(φ))/(v*k(φ)*cos(φ))
l_φd(φ, v) := l_φ(π/180*φ, v)
l_90(φ, v) := 2*(1 + k(φ))/(v*cos(φ))
l_90d(φ, v) := l_90(π/180*φ, v)
l_90d(0, v_0) = 2.5
l_φd(45, v_0) = 4.26777
l_φd(40, v_0) = 4.17033
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# Quadratic Failure Criterion Function
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s_qf(σ_1, σ_2, σ_1p, σ_1n, σ_2p, σ_2n) := σ_1*(1/σ_1p - 1/σ_1n) + σ_2*(1/σ_2p - 1/σ_2n)
r_qf(σ_1, σ_2, τ_12, σ_1p, σ_1n, σ_2p, σ_2n, τ__12) := σ_1^2/(σ_1p*σ_1n) + σ_2^2/(σ_2p*σ_2n) + τ_12^2/τ__12^2
RF_qff(s, r) := 2/(s + sqrt(s^2 + 4*r))
RF_qf(σ_1, σ_2, τ_12, σ_1p, σ_1n, σ_2p, σ_2n, τ__12) := RF_qff(s_qf(σ_1, σ_2, σ_1p, σ_1n, σ_2p, σ_2n), r_qf(σ_1, σ_2, τ_12, σ_1p, σ_1n, σ_2p, σ_2n, τ__12))
# b - Local Buckling Analysis
# Local Buckling Stresses for the Ribs (MPa)
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σ_crφ(φ, v) := k_b*sin(φ)^2*cos(φ)^2/(k_l^2*(1 + k(φ))^2)*v^2
σ_crφd(φ, v) := σ_crφ(π/180*φ, v)
σ_cr90(φ, v) := k_b*cos(φ)^2/(4*k_l^2*(1 + k(φ))^2)*v^2
σ_cr90d(φ, v) := σ_cr90(π/180*φ, v)
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RF_bφ(φ, v) := RF_qf(σ_r(φ, φ, v)[0], σ_ins, σ_ins, σ_inf, σ_crφ(φ, v), 1, 1, 1)
RF_bφd(φ, v) := RF_bφ(π/180*φ, v)
RF_bφd(10, 1) = 8.83883e99
RF_b_φ(φ, v) := RF_qf(σ_r(-φ, φ, v)[0], σ_ins, σ_ins, σ_inf, σ_crφ(φ, v), 1, 1, 1)
RF_b_φd(φ, v) := RF_b_φ(π/180*φ, v)
RF_b90(φ, v) := RF_qf(σ_r(π/2, φ, v)[0], σ_ins, σ_ins, σ_inf, σ_cr90(φ, v), 1, 1, 1)
RF_b90d(φ, v) := RF_b90(π/180*φ, v)
RF_b(φ, v) := min(RF_bφ(φ, v), RF_b_φ(φ, v), RF_b90(φ, v))
RF_bd(φ, v) := RF_b(π/180*φ, v)
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# 1 - Quadratic Failure Criterion - Reserve Factor
RF_1φ(φ, v) := RF_qf(σ_r(φ, φ, v)[0], σ_r(φ, φ, v)[1], τ_r13(φ, φ, v), σ_1_t, σ_1_c, σ_3_t, σ_3_c, τ_13_)
s_1(θ, φ, v) := σ_r(θ, φ, v)[0]*(1/σ_1_t - 1/σ_1_c) + σ_r(θ, φ, v)[1]*(1/σ_3_t - 1/σ_3_c)
RF_1_φ(φ, v) := RF_qf(σ_r(-φ, φ, v)[0], σ_r(-φ, φ, v)[1], τ_r13(-φ, φ, v), σ_1_t, σ_1_c, σ_3_t, σ_3_c, τ_13_)
RF1_1φ(φ, v) := RF_1(φ, φ, v)  # error: This variable is undefined.
RF1_1_φ(φ, v) := RF_1(-φ, φ, v)  # error: This variable is undefined.
RF_190(φ, v) := RF_qf(σ_r(π/2, φ, v)[0], σ_r(π/2, φ, v)[1], τ_r13(π/2, φ, v), σ_1_t, σ_1_c, σ_3_t, σ_3_c, τ_13_)
r_1(θ, φ, v) := σ_r(θ, φ, v)[0]^2/(σ_1_t*σ_1_c) + σ_r(θ, φ, v)[1]^2/(σ_3_t*σ_3_c) + τ_r13(θ, φ, v)^2/τ_13_^2
RF1_190(φ, v) := RF_1(π/2, φ, v)  # error: This variable is undefined.
RF_1φd(φ, v) := RF_1φ(π/180*φ, v)
RF_1(θ, φ, v) := 2/(s_1(θ, φ, v) + sqrt(s_1(θ, φ, v)^2 + 4*r_1(θ, φ, v)))
RF_1_φd(φ, v) := RF_1_φ(π/180*φ, v)
RF_190d(φ, v) := RF_190(π/180*φ, v)
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RF_1(φ, v) := min(RF_1φ(φ, v), RF_1_φ(φ, v), RF_190(φ, v))
RF_1d(φ, v) := RF_1(π/180*φ, v)
RF_1d(0.1, 0.2) = 0.419843
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# 2 - Maximum Srains Criterion - Reserve Factor
# Ribs φ
RF_21φ(φ, v) := RF_qf(ε_r(φ, φ, v)[0], σ_ins, σ_ins, ε_1_t, ε_1_c, ε_3_t, ε_3_c, γ_13_)
RF_21φd(φ, v) := RF_21φ(π/180*φ, v)
RF_23φ(φ, v) := RF_qf(σ_ins, ε_r(φ, φ, v)[1], σ_ins, ε_1_t, ε_1_c, ε_3_t, ε_3_c, γ_13_)
RF_23φd(φ, v) := RF_23φ(π/180*φ, v)
RF_213φ(φ, v) := RF_qf(σ_ins, σ_ins, γ_13(φ, φ, v), ε_1_t, ε_1_c, ε_3_t, ε_3_c, γ_13_)
RF_213φd(φ, v) := RF_213φ(π/180*φ, v)
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# Ribs -φ
RF_21_φ(φ, v) := RF_qf(ε_r(-φ, φ, v)[0], σ_ins, σ_ins, ε_1_t, ε_1_c, ε_3_t, ε_3_c, γ_13_)
RF_21_φd(φ, v) := RF_21_φ(π/180*φ, v)
RF_23_φ(φ, v) := RF_qf(σ_ins, ε_r(-φ, φ, v)[1], σ_ins, ε_1_t, ε_1_c, ε_3_t, ε_3_c, γ_13_)
RF_23_φd(φ, v) := RF_23_φ(π/180*φ, v)
RF_213_φ(φ, v) := RF_qf(σ_ins, σ_ins, γ_13(-φ, φ, v), ε_1_t, ε_1_c, ε_3_t, ε_3_c, γ_13_)
RF_213_φd(φ, v) := RF_213_φ(π/180*φ, v)
# Ribs 90
RF_2190(φ, v) := RF_qf(ε_r(π/2, φ, v)[0], σ_ins, σ_ins, ε_1_t, ε_1_c, ε_3_t, ε_3_c, γ_13_)
RF_2190d(φ, v) := RF_2190(π/180*φ, v)
RF_2390(φ, v) := RF_qf(σ_ins, ε_r(π/2, φ, v)[1], σ_ins, ε_1_t, ε_1_c, ε_3_t, ε_3_c, γ_13_)
RF_2390d(φ, v) := RF_2390(π/180*φ, v)
RF_21390(φ, v) := RF_qf(σ_ins, σ_ins, γ_13(π/2, φ, v), ε_1_t, ε_1_c, ε_3_t, ε_3_c, γ_13_)
RF_21390d(φ, v) := RF_21390(π/180*φ, v)
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# Ribs φ
RF_2φ(φ, v) := min(RF_21φ(φ, v), RF_23φ(φ, v), RF_213φ(φ, v))
RF_2φd(φ, v) := RF_2φ(π/180*φ, v)
# Ribs -φ
RF_2_φ(φ, v) := min(RF_21_φ(φ, v), RF_23_φ(φ, v), RF_213_φ(φ, v))
RF_2_φd(φ, v) := RF_2_φ(π/180*φ, v)
# Ribs 90
RF_290(φ, v) := min(RF_2190(φ, v), RF_2390(φ, v), RF_21390(φ, v))
RF_290d(φ, v) := RF_290(π/180*φ, v)
RF_2(φ, v) := min(RF_2φ(φ, v), RF_2_φ(φ, v), RF_290(φ, v))
RF_2d(φ, v) := RF_2(π/180*φ, v)
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# 3 - Maximum Stress Criterion - Reserve Factor
# Ribs φ
RF_31φ(φ, v) := RF_qf(σ_r(φ, φ, v)[0], σ_ins, σ_ins, σ_1_t, σ_1_c, σ_3_t, σ_3_c, τ_13_)
RF_31φd(φ, v) := RF_31φ(π/180*φ, v)
RF_33φ(φ, v) := RF_qf(σ_ins, σ_r(φ, φ, v)[1], σ_ins, σ_1_t, σ_1_c, σ_3_t, σ_3_c, τ_13_)
RF_33φd(φ, v) := RF_33φ(π/180*φ, v)
RF_313φ(φ, v) := RF_qf(σ_ins, σ_ins, τ_r13(φ, φ, v), σ_1_t, σ_1_c, σ_3_t, σ_3_c, τ_13_)
RF_313φd(φ, v) := RF_313φ(π/180*φ, v)
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# Ribs -φ
RF_31_φ(φ, v) := RF_qf(σ_r(-φ, φ, v)[0], σ_ins, σ_ins, σ_1_t, σ_1_c, σ_3_t, σ_3_c, τ_13_)
RF_31_φd(φ, v) := RF_31_φ(π/180*φ, v)
RF_33_φ(φ, v) := RF_qf(σ_ins, σ_r(-φ, φ, v)[1], σ_ins, σ_1_t, σ_1_c, σ_3_t, σ_3_c, τ_13_)
RF_33_φd(φ, v) := RF_33_φ(π/180*φ, v)
RF_313_φ(φ, v) := RF_qf(σ_ins, σ_ins, τ_r13(-φ, φ, v), σ_1_t, σ_1_c, σ_3_t, σ_3_c, τ_13_)
RF_313_φd(φ, v) := RF_313_φ(π/180*φ, v)
# Ribs 90
RF_3190(φ, v) := RF_qf(σ_r(π/2, φ, v)[0], σ_ins, σ_ins, σ_1_t, σ_1_c, σ_3_t, σ_3_c, τ_13_)
RF_3190d(φ, v) := RF_3190(π/180*φ, v)
RF_3390(φ, v) := RF_qf(σ_ins, σ_r(π/2, φ, v)[1], σ_ins, σ_1_t, σ_1_c, σ_3_t, σ_3_c, τ_13_)
RF_3390d(φ, v) := RF_3390(π/180*φ, v)
RF_31390(φ, v) := RF_qf(σ_ins, σ_ins, τ_r13(π/2, φ, v), σ_1_t, σ_1_c, σ_3_t, σ_3_c, τ_13_)
RF_31390d(φ, v) := RF_31390(π/180*φ, v)
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# Ribs φ
RF_3φ(φ, v) := min(RF_31φ(φ, v), RF_33φ(φ, v), RF_313φ(φ, v))
RF_3φd(φ, v) := RF_3φ(π/180*φ, v)
# Ribs -φ
RF_3_φ(φ, v) := min(RF_31_φ(φ, v), RF_33_φ(φ, v), RF_313_φ(φ, v))
RF_3_φd(φ, v) := RF_3_φ(π/180*φ, v)
# Ribs 90
RF_390(φ, v) := min(RF_3190(φ, v), RF_3390(φ, v), RF_31390(φ, v))
RF_390d(φ, v) := RF_390(π/180*φ, v)
RF_3(φ, v) := min(RF_3φ(φ, v), RF_3_φ(φ, v), RF_390(φ, v))
RF_3d(φ, v) := RF_3(π/180*φ, v)
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# b - local buckling
# 1 - quadratic criterion
# 2 - maximum strain criterion
# 3 - maximum stress criterion
RF_s(φ, v) := RF_3(φ, v)
RF_sd(φ, v) := RF_s(π/180*φ, v)
RF(φ, v) := min(RF_s(φ, v), RF_b(φ, v))
RF_d(φ, v) := RF(π/180*φ, v)
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# Failure Effective Stresses (MPa)
σ_xf(φ, v) := σ_xe*RF(φ, v)
σ_yf(φ, v) := σ_ye*RF(φ, v)
σ_zf(φ, v) := σ_ze*RF(φ, v)
τ_xyf(φ, v) := τ_xye*RF(φ, v)
τ_xzf(φ, v) := τ_xze*RF(φ, v)
τ_yzf(φ, v) := τ_yze*RF(φ, v)
σ_xfd(φ, v) := σ_xf(φ*π/180, v)
σ_yfd(φ, v) := σ_yf(φ*π/180, v)
σ_zfd(φ, v) := σ_zf(φ*π/180, v)
τ_xyfd(φ, v) := τ_xyf(φ*π/180, v)
τ_xzfd(φ, v) := τ_xzf(φ*π/180, v)
τ_yzfd(φ, v) := τ_yzf(φ*π/180, v)
# Applied Loads (N)
P_xxfd(φ, v) := P_xx*RF_d(φ, v)
P_xyfd(φ, v) := P_xy*RF_d(φ, v)
P_xzfd(φ, v) := P_xz*RF_d(φ, v)
P_yyfd(φ, v) := P_yy*RF_d(φ, v)
P_yxfd(φ, v) := P_yx*RF_d(φ, v)
P_yzfd(φ, v) := P_yz*RF_d(φ, v)
P_zzfd(φ, v) := P_zz*RF_d(φ, v)
P_zxfd(φ, v) := P_zx*RF_d(φ, v)
P_zyfd(φ, v) := P_zy*RF_d(φ, v)
φ_s := 15
v_s := 0.8
RF_d(φ_s, v_s) = 1.29088
P_xxfd(φ_s, v_s) = 0
P_xzfd(φ_s, v_s) = 1057.22
P_zxfd(φ_s, v_s) = 5286.08
P_s := sqrt(P_xzfd(φ_s, v_s)^2 + P_zxfd(φ_s, v_s)^2) = 5390.77
