# Input Data
# Mechanical Properties (moduli in GPa)
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E_1t := 31.551
E_1c := 24.154
E_3 := 0.551
E_1 := (E_1t + E_1c)/2 = 27.8525
ν_31 := 0.432
ν_13 := E_3/E_1*ν_31 = 0.00854616
E__1 := E_1/(1 - ν_13*ν_31) = 27.9557
G_13 := 0.322
E__3 := E_3/(1 - ν_13*ν_31) = 0.553042
k_b := π^3*E__1/12*10^3 = 72233.5  # MPa
A_r := 10^3*[E__1, E__1*ν_13; E__3*ν_31, E__3]  # MPa
ψ_0 := 0
# Geometry parameters
# mm
l_s := 48
w_s := 23
t_s := 9.6
k(φ) := |sin(φ)|
k_l := 1
l_s := 100
w_s := 23
t_s := 8
t_0 := 2
ψ_0 := 2*t_0/w_s = 0.173913
S_x := w_s*t_s = 184
S_y := l_s*t_s = 800
S_z := l_s*w_s = 2300
# Allowables (MPa)
σ_1_t := 394.8
σ_1_c := 89.3
σ_3_t := 0.8
σ_3_c := 68.4*8/7 = 78.1714
τ_13_ := 7.8
σ_inf := σ_1_t*10^11
σ_ins := σ_3_t*10^-100
ε_1_t := σ_1_t/(E_1*10^3) = 0.0141747
ε_1_c := σ_1_c/(E_1*10^3) = 0.00320618
ε_3_t := σ_3_t/(E_3*10^3) = 0.00145191
ε_3_c := σ_3_c/(E_3*10^3) = 0.141872
γ_13_ := τ_13_/(G_13*10^3) = 0.0242236
ε_1_t := 0.0118
ε_1_c := 0.0036
ε_3_t := 0.0194
ε_3_c := 0.1632
γ_13_ := 0.049
# Applied Effective Stresses (MPa)
394.8/3.09 = 127.767
σ_xe := 10^4/S_x = 54.3478
σ_ye := 0
σ_ze := 0
τ_xye := 0
τ_xze := 0
τ_yze := 0
σ_xe*S_x = 10000
σx_14 := transpose([σ_xe, σ_ye, σ_ze, τ_xye])*10^-3
τx_56 := transpose([τ_xze, τ_yze])*10^-3
# Applied Loads (N)
P_xy := τ_xye*S_x = 0
P_xz := τ_xze*S_x = 0
P_xx := σ_xe*S_x = 10000
P_yy := σ_ye*S_y = 0
P_yx := τ_xye*S_y = 0
P_yz := τ_yze*S_y = 0
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P_zz := σ_ze*S_z = 0
P_zx := τ_xze*S_z = 0
P_zy := τ_yze*S_z = 0
# Effective moduli for 3D model (moduli in GPa)
ψ90(φ, v) := v*k(φ)/(1 + k(φ))
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S_n(φ, v, ψ0) := ψ90(φ, v)/k(φ)*E__1*[
    cos(φ)^4, sin(φ)^2*cos(φ)^2, ν_13*cos(φ)^2;
    sin(φ)^2*cos(φ)^2, k(φ) + sin(φ)^4, ν_13*(k(φ) + sin(φ)^2);
    ν_13*cos(φ)^2, ν_13*(k(φ) + sin(φ)^2), (k(φ) + 1)*ν_13/ν_31
] + ψ0*E__1*[1, 0, ν_13; 0, 0, 0; ν_13, 0, ν_13/ν_31]
S_s(φ, v, ψ0) := ψ90(φ, v)/k(φ)*[E__1*sin(φ)^2*cos(φ)^2, 0, 0; 0, G_13*cos(φ)^2, 0; 0, 0, (k(φ)^2 + sin(φ))*G_13] + ψ0*[0, 0, 0; 0, 0, 0; 0, 0, G_13]
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C_n(φ, v, ψ0) := S_n(φ, v, ψ0)^-1
C_s(φ, v, ψ0) := S_s(φ, v, ψ0)^-1
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E_y0(φ, v, ψ0) := 1/C_n(φ, v, ψ0)[1, 1]
E_x0(φ, v, ψ0) := 1/C_n(φ, v, ψ0)[0, 0]
E_z0(φ, v, ψ0) := 1/C_n(φ, v, ψ0)[2, 2]
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G_yz0(φ, v, ψ0) := 1/C_s(φ, v, ψ0)[2, 2]
G_xy0(φ, v, ψ0) := 1/C_s(φ, v, ψ0)[0, 0]
G_xz0(φ, v, ψ0) := 1/C_s(φ, v, ψ0)[1, 1]
ν_xy0(φ, v, ψ0) := -C_n(φ, v, ψ0)[0, 1]*E_y0(φ, v, ψ0)
ν_xz0(φ, v, ψ0) := -C_n(φ, v, ψ0)[0, 2]*E_z0(φ, v, ψ0)
ν_yz0(φ, v, ψ0) := -C_n(φ, v, ψ0)[1, 2]*E_z0(φ, v, ψ0)
E_x1(φ, v) := cos(φ)^4*k(φ)*E_1*v/((k(φ) + sin(φ)^4)*(1 + k(φ)*(1 - ν_13*ν_31)) + ((k(φ) - 1)*sin(φ)^2 - 2*k(φ))*sin(φ)^2*ν_13*ν_31)
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E_y1(φ, v) := E_1*k(φ)*v/(k(φ) - ν_13*ν_31 + 1)
E_z1(v) := E_3*v
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G_xy1(φ, v) := cos(φ)^2*sin(φ)^2/(1 + k(φ))*E__1*v
G_xz1(φ, v) := cos(φ)^2/(1 + k(φ))*G_13*v
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G_yz1(φ, v) := (k(φ) + sin(φ)^2)/(1 + k(φ))*G_13*v
ν_xy1(φ) := sin(φ)^2/cos(φ)^2 - k(φ)*ν_13*ν_31/((k(φ) + 1 - ν_13*ν_31)*cos(φ)^2)
ν_xz1 := ν_13
ν_yz1 := ν_13
v_00 := 0.2
E_x(φ, v, ψ0) := E_x0(φ, v, ψ0)
E_y(φ, v, ψ0) := E_y0(φ, v, ψ0)
E_z(φ, v, ψ0) := E_z0(φ, v, ψ0)
G_xy(φ, v, ψ0) := G_xy0(φ, v, ψ0)
G_xz(φ, v, ψ0) := G_xz0(φ, v, ψ0)
G_yz(φ, v, ψ0) := G_yz0(φ, v, ψ0)
ν_xy(φ, v, ψ0) := ν_xy0(φ, v, ψ0)
ν_xz(φ, v, ψ0) := ν_xz0(φ, v, ψ0)
ν_yz(φ, v, ψ0) := ν_yz0(φ, v, ψ0)
ψ_00 := 0
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E_xd(φ, v, ψ0) := E_x(π/180*φ, v, ψ0)
E_yd(φ, v, ψ0) := E_y(π/180*φ, v, ψ0)
E_zd(φ, v, ψ0) := E_z(π/180*φ, v, ψ0)
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G_xyd(φ, v, ψ0) := G_xy(π/180*φ, v, ψ0)
G_xzd(φ, v, ψ0) := G_xz(π/180*φ, v, ψ0)
G_yzd(φ, v, ψ0) := G_yz(π/180*φ, v, ψ0)
ν_xzd(φ, v, ψ0) := ν_xz(π/180*φ, v, ψ0)
ν_yzd(φ, v, ψ0) := ν_yz(π/180*φ, v, ψ0)
ν_xyd(φ, v, ψ0) := ν_xy(π/180*φ, v, ψ0)
ν_zxd(φ, v, ψ0) := E_xd(φ, v, ψ0)*ν_xzd(φ, v, ψ0)/E_zd(φ, v, ψ0)
v_0 := 0.8
φ_0 := 15
E_xd(φ_0, v_0, ψ_0) = 20.0094
E_zd(φ_0, v_0, ψ_0) = 0.536626
C_14e(φ, v, ψ0) := [
    C_n(φ, v, ψ0)[0, 0], C_n(φ, v, ψ0)[0, 1], C_n(φ, v, ψ0)[0, 2], 0;
    C_n(φ, v, ψ0)[1, 0], C_n(φ, v, ψ0)[1, 1], C_n(φ, v, ψ0)[1, 2], 0;
    C_n(φ, v, ψ0)[2, 0], C_n(φ, v, ψ0)[2, 1], C_n(φ, v, ψ0)[2, 2], 0;
    0, 0, 0, C_s(φ, v, ψ0)[0, 0]
]
C_e(φ, v, ψ0) := [
    C_n(φ, v, ψ0)[0, 0], C_n(φ, v, ψ0)[0, 1], C_n(φ, v, ψ0)[0, 2];
    C_n(φ, v, ψ0)[1, 0], C_n(φ, v, ψ0)[1, 1], C_n(φ, v, ψ0)[1, 2];
    C_n(φ, v, ψ0)[2, 0], C_n(φ, v, ψ0)[2, 1], C_n(φ, v, ψ0)[2, 2]
]
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C_56e(φ, v, ψ0) := [C_s(φ, v, ψ0)[1, 1], 0; 0, C_s(φ, v, ψ0)[2, 2]]
v_0 = 0.8
# Strains in XYZ CS (mm/mm)
εx_14(φ, v, ψ0) := C_14e(φ, v, ψ0)*σx_14
εx_14d(φ, v, ψ0) := εx_14(π/180*φ, v, ψ0)
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γx_56(φ, v, ψ0) := C_56e(φ, v, ψ0)*τx_56
γx_56d(φ, v, ψ0) := γx_56(π/180*φ, v, ψ0)
# Strains in the ribs (in 1-3 CS, mm/mm)
ε_1(θ, φ, v, ψ0) := εx_14(φ, v, ψ0)[0]*cos(θ)^2 + εx_14(φ, v, ψ0)[1]*sin(θ)^2 + εx_14(φ, v, ψ0)[3]*cos(θ)*sin(θ)
ε_3(θ, φ, v, ψ0) := εx_14(φ, v, ψ0)[2]
γ_13(θ, φ, v, ψ0) := γx_56(φ, v, ψ0)[0]*cos(φ) + γx_56(φ, v, ψ0)[1]*sin(φ)
ε_1d(θ, φ, v, ψ0) := ε_1(π/180*θ, π/180*φ, v, ψ0)
ε_3d(θ, φ, v, ψ0) := ε_3(π/180*θ, π/180*φ, v, ψ0)
γ_13d(θ, φ, v, ψ0) := γ_13(π/180*θ, π/180*φ, v, ψ0)
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ε_r(θ, φ, v, ψ0) := [ε_1(θ, φ, v, ψ0); ε_3(θ, φ, v, ψ0)]
# Stresses in the ribs (in 1-3 CS, MPa)
σ_r(θ, φ, v, ψ0) := A_r*ε_r(θ, φ, v, ψ0)
σ_rd(θ, φ, v, ψ0) := σ_r(π/180*θ, π/180*φ, v, ψ0)
τ_r13(θ, φ, v, ψ0) := 10^3*G_13*γ_13(θ, φ, v, ψ0)
τ_r13d(θ, φ, v, ψ0) := τ_r13(π/180*θ, π/180*φ, v, ψ0)
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σ_rd(φ_0, φ_0, v_0, ψ_0)[0] = 69.4474
σ_rd(φ_0, φ_0, v_0, ψ_0)[1] = 0.116602
τ_r13d(φ_0, φ_0, v_0, ψ_0) = 0
σ_rd(90, φ_0, v_0, ψ_0)[0] = -17.9743
σ_rd(90, φ_0, v_0, ψ_0)[1] = -0.630518
τ_r13d(90, φ_0, v_0, ψ_0) = 0
σ_rd(0, φ_0, v_0, ψ_0)[0] = 75.7239
σ_rd(0, φ_0, v_0, ψ_0)[1] = 0.170243
τ_r13d(0, φ_0, v_0, ψ_0) = 0
# Analysis of the normalized rib dimensions
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l_φ(φ, v) := (1 + k(φ))/(v*k(φ)*cos(φ))
l_φd(φ, v) := l_φ(π/180*φ, v)
l_90(φ, v) := 2*(1 + k(φ))/(v*cos(φ))
l_90d(φ, v) := l_90(π/180*φ, v)
l_90d(0, v_0) = 2.5
l_φd(45, v_0) = 4.26777
l_φd(40, v_0) = 4.17033
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# Quadratic Failure Criterion Function
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s_qf(σ_1, σ_2, σ_1p, σ_1n, σ_2p, σ_2n) := σ_1*(1/σ_1p - 1/σ_1n) + σ_2*(1/σ_2p - 1/σ_2n)
r_qf(σ_1, σ_2, τ_12, σ_1p, σ_1n, σ_2p, σ_2n, τ__12) := σ_1^2/(σ_1p*σ_1n) + σ_2^2/(σ_2p*σ_2n) + τ_12^2/τ__12^2
RF_qff(s, r) := 2/(s + sqrt(s^2 + 4*r))
RF_qf(σ_1, σ_2, τ_12, σ_1p, σ_1n, σ_2p, σ_2n, τ__12) := RF_qff(s_qf(σ_1, σ_2, σ_1p, σ_1n, σ_2p, σ_2n), r_qf(σ_1, σ_2, τ_12, σ_1p, σ_1n, σ_2p, σ_2n, τ__12))
# Local Buckling Analysis
# Local Buckling Stresses for the Ribs (MPa)
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σ_crφ(φ, v) := k_b*sin(φ)^2*cos(φ)^2/(k_l^2*(1 + k(φ))^2)*v^2
σ_crφd(φ, v) := σ_crφ(π/180*φ, v)
σ_cr90(φ, v) := k_b*cos(φ)^2/(4*k_l^2*(1 + k(φ))^2)*v^2
σ_cr90d(φ, v) := σ_cr90(π/180*φ, v)
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RF_bφ(φ, v, ψ0) := RF_qf(σ_r(φ, φ, v, ψ0)[0], σ_ins, σ_ins, σ_inf, σ_crφ(φ, v), 1, 1, 1)
RF_bφd(φ, v) := RF_bφ(π/180*φ, v)
RF_bφd(10, 1) = ƒ(Unitless) → Unitless
RF_b_φ(φ, v, ψ0) := RF_qf(σ_r(-φ, φ, v, ψ0)[0], σ_ins, σ_ins, σ_inf, σ_crφ(φ, v), 1, 1, 1)
RF_b_φd(φ, v) := RF_b_φ(π/180*φ, v)
RF_b90(φ, v, ψ0) := RF_qf(σ_r(π/2, φ, v, ψ0)[0], σ_ins, σ_ins, σ_inf, σ_cr90(φ, v), 1, 1, 1)
RF_b90d(φ, v) := RF_b90(π/180*φ, v)
RF_b(φ, v, ψ0) := min(RF_bφ(φ, v, ψ0), RF_b_φ(φ, v, ψ0), RF_b90(φ, v, ψ0))
RF_bd(φ, v, ψ0) := RF_b(π/180*φ, v, ψ0)
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# Quadratic Failure Criterion - Reserve Factor
RF_1φ(φ, v, ψ0) := RF_qf(σ_r(φ, φ, v, ψ0)[0], σ_r(φ, φ, v, ψ0)[1], τ_r13(φ, φ, v, ψ0), σ_1_t, σ_1_c, σ_3_t, σ_3_c, τ_13_)
s_1(θ, φ, v, ψ0) := σ_r(θ, φ, v, ψ0)[0]*(1/σ_1_t - 1/σ_1_c) + σ_r(θ, φ, v, ψ0)[1]*(1/σ_3_t - 1/σ_3_c)
RF_1_φ(φ, v, ψ0) := RF_qf(σ_r(-φ, φ, v, ψ0)[0], σ_r(-φ, φ, v, ψ0)[1], τ_r13(-φ, φ, v, ψ0), σ_1_t, σ_1_c, σ_3_t, σ_3_c, τ_13_)
RF_190(φ, v, ψ0) := RF_qf(σ_r(π/2, φ, v, ψ0)[0], σ_r(π/2, φ, v, ψ0)[1], τ_r13(π/2, φ, v, ψ0), σ_1_t, σ_1_c, σ_3_t, σ_3_c, τ_13_)
r_1(θ, φ, v, ψ0) := σ_r(θ, φ, v, ψ0)[0]^2/(σ_1_t*σ_1_c) + σ_r(θ, φ, v, ψ0)[1]^2/(σ_3_t*σ_3_c) + τ_r13(θ, φ, v, ψ0)^2/τ_13_^2
RF_10(φ, v, ψ0) := RF_qf(σ_r(0*π/2, φ, v, ψ0)[0], σ_r(0, φ, v, ψ0)[1], τ_r13(0, φ, v, ψ0), σ_1_t, σ_1_c, σ_3_t, σ_3_c, τ_13_)
RF_1(θ, φ, v, ψ0) := 2/(s_1(θ, φ, v, ψ0) + sqrt(s_1(θ, φ, v, ψ0)^2 + 4*r_1(θ, φ, v, ψ0)))
RF_1φd(φ, v, ψ0) := RF_1φ(π/180*φ, v, ψ0)
RF_1_φd(φ, v, ψ0) := RF_1_φ(π/180*φ, v, ψ0)
RF1_1φ(φ, v, ψ0) := RF_1(φ, φ, v, ψ0)
RF_190d(φ, v, ψ0) := RF_190(π/180*φ, v, ψ0)
RF_10d(φ, v, ψ0) := RF_10(π/180*φ, v, ψ0)
RF1_1_φ(φ, v, ψ0) := RF_1(-φ, φ, v, ψ0)
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RF1_190(φ, v, ψ0) := RF_1(π/2, φ, v, ψ0)
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RF_1(φ, v, ψ0) := min(RF_1φ(φ, v, ψ0), RF_1_φ(φ, v, ψ0), RF_190(φ, v, ψ0), RF_10(φ, v, ψ0))
RF_1d(φ, v, ψ0) := RF_1(π/180*φ, v, ψ0)
RF_1d(0.1, 0.2, ψ_0) = 2.71173
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# Maximum Srains Criterion - Reserve Factor
RF_21φ(φ, v, ψ0) := RF_qf(ε_r(φ, φ, v, ψ0)[0], σ_ins, σ_ins, ε_1_t, ε_1_c, ε_3_t, ε_3_c, γ_13_)
RF_21φd(φ, v, ψ0) := RF_21φ(π/180*φ, v, ψ0)
RF_23φ(φ, v, ψ0) := RF_qf(σ_ins, ε_r(φ, φ, v, ψ0)[1], σ_ins, ε_1_t, ε_1_c, ε_3_t, ε_3_c, γ_13_)
RF_23φd(φ, v, ψ0) := RF_23φ(π/180*φ, v, ψ0)
RF_213φ(φ, v, ψ0) := RF_qf(σ_ins, σ_ins, γ_13(φ, φ, v, ψ0), ε_1_t, ε_1_c, ε_3_t, ε_3_c, γ_13_)
RF_213φd(φ, v, ψ0) := RF_213φ(π/180*φ, v, ψ0)
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RF_21_φ(φ, v, ψ0) := RF_qf(ε_r(-φ, φ, v, ψ0)[0], σ_ins, σ_ins, ε_1_t, ε_1_c, ε_3_t, ε_3_c, γ_13_)
RF_21_φd(φ, v, ψ0) := RF_21_φ(π/180*φ, v, ψ0)
RF_23_φ(φ, v, ψ0) := RF_qf(σ_ins, ε_r(-φ, φ, v, ψ0)[1], σ_ins, ε_1_t, ε_1_c, ε_3_t, ε_3_c, γ_13_)
RF_23_φd(φ, v, ψ0) := RF_23_φ(π/180*φ, v, ψ0)
RF_213_φ(φ, v, ψ0) := RF_qf(σ_ins, σ_ins, γ_13(-φ, φ, v, ψ0), ε_1_t, ε_1_c, ε_3_t, ε_3_c, γ_13_)
RF_213_φd(φ, v, ψ0) := RF_213_φ(π/180*φ, v, ψ0)
RF_2190(φ, v, ψ0) := RF_qf(ε_r(π/2, φ, v, ψ0)[0], σ_ins, σ_ins, ε_1_t, ε_1_c, ε_3_t, ε_3_c, γ_13_)
RF_2190d(φ, v, ψ0) := RF_2190(π/180*φ, v, ψ0)
RF_2390(φ, v, ψ0) := RF_qf(σ_ins, ε_r(π/2, φ, v, ψ0)[1], σ_ins, ε_1_t, ε_1_c, ε_3_t, ε_3_c, γ_13_)
RF_2390d(φ, v, ψ0) := RF_2390(π/180*φ, v, ψ0)
RF_21390(φ, v, ψ0) := RF_qf(σ_ins, σ_ins, γ_13(π/2, φ, v, ψ0), ε_1_t, ε_1_c, ε_3_t, ε_3_c, γ_13_)
RF_21390d(φ, v, ψ0) := RF_21390(π/180*φ, v, ψ0)
RF_210(φ, v, ψ0) := RF_qf(ε_r(0, φ, v, ψ0)[0], σ_ins, σ_ins, ε_1_t, ε_1_c, ε_3_t, ε_3_c, γ_13_)
RF_210d(φ, v, ψ0) := RF_2190(π/180*φ, v, ψ0)
RF_230(φ, v, ψ0) := RF_qf(σ_ins, ε_r(0, φ, v, ψ0)[1], σ_ins, ε_1_t, ε_1_c, ε_3_t, ε_3_c, γ_13_)
RF_230d(φ, v, ψ0) := RF_2390(π/180*φ, v, ψ0)
RF_2130(φ, v, ψ0) := RF_qf(σ_ins, σ_ins, γ_13(0, φ, v, ψ0), ε_1_t, ε_1_c, ε_3_t, ε_3_c, γ_13_)
RF_2130d(φ, v, ψ0) := RF_21390(π/180*φ, v, ψ0)
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RF_2φ(φ, v, ψ0) := min(RF_21φ(φ, v, ψ0), RF_23φ(φ, v, ψ0), RF_213φ(φ, v, ψ0))
RF_2φd(φ, v, ψ0) := RF_2φ(π/180*φ, v, ψ0)
RF_2_φ(φ, v, ψ0) := min(RF_21_φ(φ, v, ψ0), RF_23_φ(φ, v, ψ0), RF_213_φ(φ, v, ψ0))
RF_2_φd(φ, v, ψ0) := RF_2_φ(π/180*φ, v, ψ0)
RF_290(φ, v, ψ0) := min(RF_2190(φ, v, ψ0), RF_2390(φ, v, ψ0), RF_21390(φ, v, ψ0))
RF_290d(φ, v, ψ0) := RF_290(π/180*φ, v, ψ0)
RF_20(φ, v, ψ0) := min(RF_210(φ, v, ψ0), RF_230(φ, v, ψ0), RF_2130(φ, v, ψ0))
RF_20d(φ, v, ψ0) := RF_20(π/180*φ, v, ψ0)
RF_2(φ, v, ψ0) := min(RF_2φ(φ, v, ψ0), RF_2_φ(φ, v, ψ0), RF_290(φ, v, ψ0), RF_20(φ, v, ψ0))
RF_2d(φ, v, ψ0) := RF_2(π/180*φ, v, ψ0)
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# Maximum Stress Criterion - Reserve Factor
RF_31φ(φ, v, ψ0) := RF_qf(σ_r(φ, φ, v, ψ0)[0], σ_ins, σ_ins, σ_1_t, σ_1_c, σ_3_t, σ_3_c, τ_13_)
RF_31φd(φ, v, ψ0) := RF_31φ(π/180*φ, v, ψ0)
RF_33φ(φ, v, ψ0) := RF_qf(σ_ins, σ_r(φ, φ, v, ψ0)[1], σ_ins, σ_1_t, σ_1_c, σ_3_t, σ_3_c, τ_13_)
RF_33φd(φ, v, ψ0) := RF_33φ(π/180*φ, v, ψ0)
RF_313φ(φ, v, ψ0) := RF_qf(σ_ins, σ_ins, τ_r13(φ, φ, v, ψ0), σ_1_t, σ_1_c, σ_3_t, σ_3_c, τ_13_)
RF_313φd(φ, v, ψ0) := RF_313φ(π/180*φ, v, ψ0)
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RF_31_φ(φ, v, ψ0) := RF_qf(σ_r(-φ, φ, v, ψ0)[0], σ_ins, σ_ins, σ_1_t, σ_1_c, σ_3_t, σ_3_c, τ_13_)
RF_31_φd(φ, v, ψ0) := RF_31_φ(π/180*φ, v, ψ0)
RF_33_φ(φ, v, ψ0) := RF_qf(σ_ins, σ_r(-φ, φ, v, ψ0)[1], σ_ins, σ_1_t, σ_1_c, σ_3_t, σ_3_c, τ_13_)
RF_33_φd(φ, v, ψ0) := RF_33_φ(π/180*φ, v, ψ0)
RF_313_φ(φ, v, ψ0) := RF_qf(σ_ins, σ_ins, τ_r13(-φ, φ, v, ψ0), σ_1_t, σ_1_c, σ_3_t, σ_3_c, τ_13_)
RF_313_φd(φ, v, ψ0) := RF_313_φ(π/180*φ, v, ψ0)
RF_3190(φ, v, ψ0) := RF_qf(σ_r(π/2, φ, v, ψ0)[0], σ_ins, σ_ins, σ_1_t, σ_1_c, σ_3_t, σ_3_c, τ_13_)
RF_3190d(φ, v, ψ0) := RF_3190(π/180*φ, v, ψ0)
RF_3390(φ, v, ψ0) := RF_qf(σ_ins, σ_r(π/2, φ, v, ψ0)[1], σ_ins, σ_1_t, σ_1_c, σ_3_t, σ_3_c, τ_13_)
RF_3390d(φ, v, ψ0) := RF_3390(π/180*φ, v, ψ0)
RF_31390(φ, v, ψ0) := RF_qf(σ_ins, σ_ins, τ_r13(π/2, φ, v, ψ0), σ_1_t, σ_1_c, σ_3_t, σ_3_c, τ_13_)
RF_31390d(φ, v, ψ0) := RF_31390(π/180*φ, v, ψ0)
RF_310(φ, v, ψ0) := RF_qf(σ_r(0, φ, v, ψ0)[0], σ_ins, σ_ins, σ_1_t, σ_1_c, σ_3_t, σ_3_c, τ_13_)
RF_310d(φ, v, ψ0) := RF_310(π/180*φ, v, ψ0)
RF_330(φ, v, ψ0) := RF_qf(σ_ins, σ_r(0, φ, v, ψ0)[1], σ_ins, σ_1_t, σ_1_c, σ_3_t, σ_3_c, τ_13_)
RF_330d(φ, v, ψ0) := RF_330(π/180*φ, v, ψ0)
RF_3130(φ, v, ψ0) := RF_qf(σ_ins, σ_ins, τ_r13(0, φ, v, ψ0), σ_1_t, σ_1_c, σ_3_t, σ_3_c, τ_13_)
RF_3130d(φ, v, ψ0) := RF_3130(π/180*φ, v, ψ0)
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RF_3φ(φ, v, ψ0) := min(RF_31φ(φ, v, ψ0), RF_33φ(φ, v, ψ0), RF_313φ(φ, v, ψ0))
RF_3φd(φ, v, ψ0) := RF_3φ(π/180*φ, v, ψ0)
RF_3φd(φ_0, v_0, ψ_0) = 5.68488
RF_3_φ(φ, v, ψ0) := min(RF_31_φ(φ, v, ψ0), RF_33_φ(φ, v, ψ0), RF_313_φ(φ, v, ψ0))
RF_3_φd(φ, v, ψ0) := RF_3_φ(π/180*φ, v, ψ0)
RF_3_φd(φ_0, v_0, ψ_0) = 5.68488
RF_390(φ, v, ψ0) := min(RF_3190(φ, v, ψ0), RF_3390(φ, v, ψ0), RF_31390(φ, v, ψ0))
RF_390d(φ, v, ψ0) := RF_390(π/180*φ, v, ψ0)
RF_30(φ, v, ψ0) := min(RF_310(φ, v, ψ0), RF_330(φ, v, ψ0), RF_3130(φ, v, ψ0))
RF_30d(φ, v, ψ0) := RF_30(π/180*φ, v, ψ0)
RF_3(φ, v, ψ0) := min(RF_3φ(φ, v, ψ0), RF_3_φ(φ, v, ψ0), RF_390(φ, v, ψ0), RF_30(φ, v, ψ0))
RF_3d(φ, v, ψ0) := RF_3(π/180*φ, v, ψ0)
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RF_s(φ, v, ψ_0) := RF_3(φ, v, ψ_0)
RF(φ, v, ψ_0) := min(RF_s(φ, v, ψ_0), RF_b(φ, v, ψ_0))
RF_d(φ, v, ψ_0) := RF(π/180*φ, v, ψ_0)
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# Failure Effective Stresses (MPa)
σ_xf(φ, v, ψ0) := σ_xe*RF(φ, v, ψ0)
σ_yf(φ, v, ψ0) := σ_ye*RF(φ, v, ψ0)
σ_zf(φ, v, ψ0) := σ_ze*RF(φ, v, ψ0)
τ_xyf(φ, v, ψ0) := τ_xye*RF(φ, v, ψ0)
τ_xzf(φ, v, ψ0) := τ_xze*RF(φ, v, ψ0)
τ_yzf(φ, v, ψ0) := τ_yze*RF(φ, v, ψ0)
σ_xfd(φ, v, ψ0) := σ_xf(φ*π/180, v, ψ0)
σ_yfd(φ, v, ψ0) := σ_yf(φ*π/180, v, ψ0)
σ_zfd(φ, v, ψ0) := σ_zf(φ*π/180, v, ψ0)
τ_xyfd(φ, v, ψ0) := τ_xyf(φ*π/180, v, ψ0)
τ_xzfd(φ, v, ψ0) := τ_xzf(φ*π/180, v, ψ0)
τ_yzfd(φ, v, ψ0) := τ_yzf(φ*π/180, v, ψ0)
# Applied Loads (N)
P_xxfd(φ, v, ψ0) := P_xx*RF_d(φ, v, ψ0)
P_xyfd(φ, v, ψ0) := P_xy*RF_d(φ, v, ψ0)
P_xzfd(φ, v, ψ0) := P_xz*RF_d(φ, v, ψ0)
P_yyfd(φ, v, ψ0) := P_yy*RF_d(φ, v, ψ0)
P_yxfd(φ, v, ψ0) := P_yx*RF_d(φ, v, ψ0)
P_yzfd(φ, v, ψ0) := P_yz*RF_d(φ, v, ψ0)
P_zzfd(φ, v, ψ0) := P_zz*RF_d(φ, v, ψ0)
P_zxfd(φ, v, ψ0) := P_zx*RF_d(φ, v, ψ0)
P_zyfd(φ, v, ψ0) := P_zy*RF_d(φ, v, ψ0)
φ_s := 15
v_s := 0.8
RF_d(φ_s, v_s, ψ_0) = 4.69917
P_xxfd(φ_s, v_s, ψ_0) = 46991.7
